OpenVSP model (file version 5), 3 components.
Geometry view with OpenVSP parameter names; values to 6 digits, angles in degrees, lengths in the model's unit.
Overall bounding box: X_Min=-0.0383663 X_Len=4.07449 Y_Min=-0.615 Y_Len=1.23 Z_Min=-0.615 Z_Len=1.23

Fuselage "Fuselage"
  location (X Y Z) 0 0 0, rotation 0 0 0
  bounding box size 4.03837 0.75 0.75
  Design: Length=4
  cross sections:
    n  XLocPercent  YLocPercent  ZLocPercent  shape
    0  0            0            0            circle Circle_Diameter=0.1
    1  0.25         0            0            circle Circle_Diameter=0.5
    2  0.825        0            0            circle Circle_Diameter=0.725
    3  1            0            0            circle Circle_Diameter=0.75

Wing "Pitch_Fin"
  location (X Y Z) 3.4 0.365 0, rotation 0 0 0
  symmetric about XZ
  bounding box size 0.636127 1.23 0.06
  totals: TotalSpan=0.5 TotalProjectedSpan=0.5 TotalChord=0.35 TotalArea=0.175 TotalAR=1.42857
  root: chord 0.6, twist 0, wedge DuLow=0.1 DuUp=0.1 FlatLow=0 FlatUp=0 SymmThick=1 ThickChord=0.1 ThickLoc=0.5 ThickLocLow=0.5 UForeLow=0.25 UForeUp=0.75 ZCamber=0
  sections:
    n  Span  Root_Chord  Tip_Chord  Area    Sweep  Sweep_Location  Dihedral  Twist  Twist_Location  tip airfoil
    1  0.25  0.6         0.1        0.0875  65     0               0         0      0.25            as above

Wing "Yaw_Fin"
  location (X Y Z) 3.4 0 0.365, rotation 90 0 0
  symmetric about XY
  bounding box size 0.636127 0.06 1.23
  totals: TotalSpan=0.5 TotalProjectedSpan=0.5 TotalChord=0.35 TotalArea=0.175 TotalAR=1.42857
  root: chord 0.6, twist 0, wedge DuLow=0.1 DuUp=0.1 FlatLow=0 FlatUp=0 SymmThick=1 ThickChord=0.1 ThickLoc=0.5 ThickLocLow=0.5 UForeLow=0.25 UForeUp=0.75 ZCamber=0
  sections:
    n  Span  Root_Chord  Tip_Chord  Area    Sweep  Sweep_Location  Dihedral  Twist  Twist_Location  tip airfoil
    1  0.25  0.6         0.1        0.0875  65     0               0         0      0.25            as above

User parameters
  Default_Group:Length = 4  (Default_Desc)
  Default_Group:b = 0.25  (Default_Desc)
  Default_Group:cr = 0.6  (Default_Desc)
  Default_Group:ct = 0.1  (Default_Desc)
  Default_Group:de = 0  (Default_Desc)
  Default_Group:dr = 0  (Default_Desc)
  Default_Group:sweep = 65  (Default_Desc)

Advanced link "missile2"
  input Length = UserParm:Default_Group:Length
  input b = UserParm:Default_Group:b
  input cr = UserParm:Default_Group:cr
  input ct = UserParm:Default_Group:ct
  input de = UserParm:Default_Group:de
  input dr = UserParm:Default_Group:dr
  input sweep = UserParm:Default_Group:sweep
  output length = Fuselage:Design:Length
  output x_pf = Pitch_Fin:XForm:X_Location
  output x_yf = Yaw_Fin:XForm:X_Location
  output yr_yf = Yaw_Fin:XForm:Y_Rotation
  output yr_pf = Pitch_Fin:XForm:Y_Rotation
  output b1 = Pitch_Fin:XSec_1:Span
  output b2 = Yaw_Fin:XSec_1:Span
  output cr1 = Pitch_Fin:XSec_1:Root_Chord
  output cr2 = Yaw_Fin:XSec_1:Root_Chord
  output ct2 = Yaw_Fin:XSec_1:Tip_Chord
  output ct1 = Pitch_Fin:XSec_1:Tip_Chord
  output sweep1 = Pitch_Fin:XSec_1:Sweep
  output sweep2 = Yaw_Fin:XSec_1:Sweep
    x_pf = 0.85*Length;
    x_yf = 0.85*Length;
    length = Length;

    yr_pf=de;
    yr_yf=dr;

    b1 = b;
    b2 = b;

    cr1=cr;
    ct1=ct;
    cr2=cr;
    ct2=ct;

    sweep1=sweep;
    sweep2=sweep;
