OpenVSP model (file version 5), 3 components.
Geometry view with OpenVSP parameter names; values to 6 digits, angles in degrees, lengths in the model's unit.
Overall bounding box: X_Min=0 X_Len=5 Y_Min=-0.875 Y_Len=1.75 Z_Min=-0.875 Z_Len=1.75

Fuselage "Fuselage"
  location (X Y Z) 0 0 0, rotation 0 0 0
  bounding box size 5 0.75 0.75
  Design: Length=5
  cross sections:
    n  XLocPercent  YLocPercent  ZLocPercent  shape
    0  0            0            0            point
    1  0.3          0            0            circle Circle_Diameter=0.75
    2  1            0            0            as above

Wing "Fin_horizontal", child of "Fuselage"
  location (X Y Z) 4 0.375 0, rotation 0 0 0
  symmetric about XZ
  bounding box size 1 1.75 0.08
  totals: TotalSpan=1 TotalProjectedSpan=1 TotalChord=0.625 TotalArea=0.625 TotalAR=1.6
  root: chord 1, twist 0, wedge DuLow=0.1 DuUp=0.1 FlatLow=0 FlatUp=0 SymmThick=1 ThickChord=0.08 ThickLoc=0.5 ThickLocLow=0.5 UForeLow=0.25 UForeUp=0.75 ZCamber=0
  sections:
    n  Span  Root_Chord  Tip_Chord  Area    Sweep  Sweep_Location  Dihedral  Twist  Twist_Location  tip airfoil
    1  0.5   1           0.25       0.3125  0      0.9             0         0      0.25            wedge DuLow=0.1 DuUp=0.1 FlatLow=0 FlatUp=0 SymmThick=1 ThickChord=0.1 ThickLoc=0.5 ThickLocLow=0.5 UForeLow=0.25 UForeUp=0.75 ZCamber=0

Wing "Fin_vertical", child of "Fuselage"
  location (X Y Z) 4 0 0.375, rotation 90 0 0
  symmetric about XY
  bounding box size 1 0.08 1.75
  totals: TotalSpan=1 TotalProjectedSpan=1 TotalChord=0.625 TotalArea=0.625 TotalAR=1.6
  root: chord 1, twist 0, wedge DuLow=0.1 DuUp=0.1 FlatLow=0 FlatUp=0 SymmThick=1 ThickChord=0.08 ThickLoc=0.5 ThickLocLow=0.5 UForeLow=0.25 UForeUp=0.75 ZCamber=0
  sections:
    n  Span  Root_Chord  Tip_Chord  Area    Sweep  Sweep_Location  Dihedral  Twist  Twist_Location  tip airfoil
    1  0.5   1           0.25       0.3125  0      0.9             0         0      0.25            wedge DuLow=0.1 DuUp=0.1 FlatLow=0 FlatUp=0 SymmThick=1 ThickChord=0.1 ThickLoc=0.5 ThickLocLow=0.5 UForeLow=0.25 UForeUp=0.75 ZCamber=0

User parameters
  Default_Group:Fins_pitch = 0  (Default_Desc)
  Default_Group:Fins_span = 0.5  (Default_Desc)
  Default_Group:Fins_yaw = 0  (Default_Desc)
  Default_Group:Length = 5  (Default_Desc)

Parameter links (A drives B)
  UserParm:Default_Group:Length -> Fuselage:Design:Length Offset=0
  UserParm:Default_Group:Length -> Fin_horizontal:XForm:X_Rel_Location Offset=-1
  UserParm:Default_Group:Length -> Fin_vertical:XForm:X_Rel_Location Offset=-1
  UserParm:Default_Group:Fins_yaw -> Fin_vertical:XForm:Y_Rel_Rotation Offset=0
  UserParm:Default_Group:Fins_pitch -> Fin_horizontal:XForm:Y_Rel_Rotation Offset=0
  UserParm:Default_Group:Fins_span -> Fin_horizontal:XSec_1:Span Offset=0
  UserParm:Default_Group:Fins_span -> Fin_vertical:XSec_1:Span Offset=0
