OpenVSP model (file version 5), 6 components.
Geometry view with OpenVSP parameter names; values to 6 digits, angles in degrees, lengths in the model's unit.
Overall bounding box: X_Min=-5.25 X_Len=25.6007 Y_Min=-19.9171 Y_Len=39.8343 Z_Min=-2.25 Z_Len=7.25

Blank "LW_wide"
  location (X Y Z) 4.5 0 -1, rotation 0 0 0

Fuselage "FuselageGeom", child of "LW_wide"
  location (X Y Z) -5.25 0 0, rotation 0 0 0
  bounding box size 22 5.53443 5
  Design: Length=22
  cross sections:
    n  XLocPercent  YLocPercent  ZLocPercent  shape
    0  0            0            0            point
    1  0.0681818    0            0            circle Circle_Diameter=1
    2  0.0681818    0            0            super ellipse Super_Height=1 Super_M=4 Super_M_bot=1.75 Super_MaxWidthLoc=0 Super_N=2 Super_N_bot=2 Super_TopBotSym=0 Super_Width=3
    3  0.253409     0            -0.0227273   general fuselage BotStr=1.14791 BotTanAngle=90 CornerRad=0 Height=3 LowStr=1.10632 MaxWidthLoc=0.136364 TopStr=1.26436 TopTanAngle=90 UpStr=0.83 Width=5
    4  0.454545     0            0.0113636    general fuselage BotStr=1.45 BotTanAngle=90 CornerRad=0 Height=5 LowStr=0.83 MaxWidthLoc=-0.272727 TopStr=1.16105 TopTanAngle=90 UpStr=1.36818 Width=5.5
    5  0.681818     0            -0.0113636   general fuselage BotStr=1.25605 BotTanAngle=90 CornerRad=0 Height=3 LowStr=1.12295 MaxWidthLoc=0 TopStr=1.17286 TopTanAngle=90 UpStr=1.02314 Width=4
    6  1            0            -0.0113636   point

Wing "Wing", child of "LW_wide"
  location (X Y Z) 2.65 0 -1.5, rotation 0 2 0
  symmetric about XZ
  bounding box size 5.06729 39.8343 2.11591
  totals: TotalSpan=40 TotalProjectedSpan=39.8343 TotalChord=4.5 TotalArea=164 TotalAR=9.67542
  root: chord 5, twist 0, NACA 63-series A=1 IdealCl=0.4 ThickChord=0.12
  sections:
    n  Span  Root_Chord  Tip_Chord  Area  Sweep  Sweep_Location  Dihedral  Twist  Twist_Location  tip airfoil
    1  2     5           5          10    2      0               0         0      0.25            as above
    2  18    5           3          72    0      0.75            5.5       -2     0.25            NACA 63-series A=1 IdealCl=0.2 ThickChord=0.12

Wing "HT", child of "LW_wide"
  location (X Y Z) 14 0 0.25, rotation 0 0 0
  symmetric about XZ
  bounding box size 4 11 0.480217
  totals: TotalSpan=11 TotalProjectedSpan=11 TotalChord=3.25 TotalArea=35.75 TotalAR=3.38462
  root: chord 4, twist 0, NACA 4-series Camber=0 CamberLoc=0.2 ThickChord=0.12
  sections:
    n  Span  Root_Chord  Tip_Chord  Area    Sweep  Sweep_Location  Dihedral  Twist  Twist_Location  tip airfoil
    1  5.5   4           2.5        17.875  0      0.75            0         0      0.25            NACA 4-series Camber=0 CamberLoc=0.2 ThickChord=0.09

Wing "WingGeom", child of "LW_wide"
  location (X Y Z) 12 0 0, rotation 90 0 0
  bounding box size 8.35073 0.700406 5
  totals: TotalSpan=5 TotalProjectedSpan=5 TotalChord=4 TotalArea=16.25 TotalAR=1.53846
  root: chord 7, twist 0, NACA 4-series Camber=0 CamberLoc=0.2 ThickChord=0.1
  sections:
    n  Span  Root_Chord  Tip_Chord  Area  Sweep    Sweep_Location  Dihedral  Twist  Twist_Location  tip airfoil
    1  1     7           3.5        5.25  48.8636  0.75            0         0      0.25            as above
    2  4     3.5         2          11    20       0.75            0         0      0.25            as above

Wing "WingGeom", child of "WingGeom"
  location (X Y Z) 12 0 0, rotation -90 0 0
  bounding box size 7 0.700406 1
  totals: TotalSpan=1 TotalProjectedSpan=1 TotalChord=6 TotalArea=6 TotalAR=0.166667
  root: chord 7, twist 0, NACA 4-series Camber=0 CamberLoc=0.2 ThickChord=0.1
  sections:
    n  Span  Root_Chord  Tip_Chord  Area  Sweep    Sweep_Location  Dihedral  Twist  Twist_Location  tip airfoil
    1  1     7           5          6     11.9903  0.75            0         0      0.25            as above
